// COMSOL Multiphysics 6.1.0.282 model "switchModel-spherocylinder2DRotSymm-rhoD-3000-wavelengthPeriodSweep.mph"
// Outline of the model tree
// Unit system: none

Parameters
  L = 50
  he = 0.5
  dL = 0.1
  rhoD = 3000
  rhoE = 3000
  DD = 16
  DE = 10
  Dd = 0.05
  Dde = 0.05
  De = 1
  kD = 1
  kdD = 0.005
  kdEr = 1.5
  kdEl = 10^-5*2
  kde = 1
  lambda = 5
  mu = 20
  pert = 0.01
  pm = 0
  ke = 1/10
  ked = kdEr

Functions
  rn1: Random | nargs = 3; seed = 20221104

Variables
  var1 "Variables 1"

Geometry
  geom1 "Geometry 1" (2D axisymmetric, length unit m)
    r1: Rectangle | size = {he, L}
    c1: Circle | rot = 270; r = he; angle = 90
    c2: Circle | pos = {0, L}; r = he; angle = 90
    fin: Finalize "Form Union"

Physics
  g: GeneralFormPDE on all domains
    dependent variable u = {uDD, uDT, uEr, uEl}
    ShapeProperty.order = 1
    gfeq1: GeneralFormPDE (default)
      f = {-lambda*uDD+DD*uDDr/r, lambda*uDD+DD*uDTr/r, -mu*uEr+DE*uErr/r, mu*uEr+DE*uElr/r}
      Ga = {{-DD*uDDr, -DD*uDDz}, {-DD*uDTr, -DD*uDTz}, {-DE*uErr, -DE*uErz}, {-DE*uElr, -DE*uElz}}
      da = {1, 0, 0, 0, 0, 1, 0, 0, 0, 0, 1, 0, 0, 0, 0, 1}
    zflx1: ZeroFluxBoundary "Zero Flux 1" (default)
    init1: init "Initial Values 1" (default) | uDT = rhoD*(1+pert*rn1(r,z,1)); uEl = rhoE*(1+pert*rn1(r,z,2))
    flux1: FluxBoundary "Flux/Source 1" on boundaries 6-8
      g = {kde*ude, -(kD+kdD*ud)*uDT, -kdEr*ud*uEr+(1-pm)*kde*ude+ke*ue, -kdEl*ud*uEl}
  gb: GeneralFormBoundaryPDE on boundaries 6-8
    dependent variable u2 = {ud, ude, ue}
    gfeq1: GeneralFormPDE (default)
      f = {(kD+kdD*ud)*uDT-(kdEr*uEr+kdEl*uEl+ked*ue)*ud+Dd*udTr/r, (kdEr*uEr+kdEl*uEl+ked*ue)*ud-kde*ude+Dde*udeTr/r, pm*kde*ude-ked*ud*ue-ke*ue+De*ueTr/r}
      Ga = {{-udTr*Dd, -udTz*Dd}, {-udeTr*Dde, -udeTz*Dde}, {-ueTr*De, -ueTz*De}}
      da = 1
    init1: init "Initial Values 1" (default)

Mesh
  mesh1 "Mesh 1"
    size: MeshSizeDefault | hmin = dL; custom = on; hmax = 1
    ftri1: FreeTri "Free Triangular 1" on remaining entities | method = del
      size1: Size on entire geometry | hmax = dL; hmin = dL; custom = on

Studies
  std1 "Study 1"
    batsw: BatchSweep (disabled)
      sweeptype = filled
      pname = {rhoD, rhoE}
      plistarr = {10^range(2,0.2,4), 10^range(2,0.2,4.4)}
      punit = {, }
      batchfile = switchModelRotSim.mph
      clustersettings = on
      batchdir = D:\Henrik\Projects\2021-Min-in-vivo\switchPMBModel-spherocylinder\LeschiSim-derivedParams\comsolData
      maxallow = 4
    param: Parametric "Parametric Sweep" | sweeptype = filled; pname = rhoE; plistarr = 10^range(2.4,0.2,3.6)
    time: Transient "Time Dependent" | tlist = range(0,2,3000); usertol = on; rtol = 10^-5

Solver configurations
  sol1 "Solution 1" (study std1)
    v1: Variables "Dependent Variables 1"
    t1: Time "Time-Dependent Solver 1"
      tlist = range(0,2,3000)
      atolglobalvaluemethod = manual
      atolglobal = 10^-5
      initialstepbdf = 10^-7
      bwinitstepfrac = 10^-4
      dDef: Direct | linsolver = pardiso
      fc1: FullyCoupled | linsolver = dDef
  sol140 "Parametric Solutions 3" (study std1)

Datasets
  dset1: Solution | solution = sol1
  edg1: Edge2D on boundaries 6 | data = dset4
  par1: Parametric1D "Parametric Extrusion 1D 1" | data = edg1; interp = {range(2000,2,3000), }
  dset4: Solution | solution = sol140
  rev2: Revolve2D "Revolution 2D 2" | data = dset4; startangle = -90; revangle = 225

Derived values
  int1: IntSurface "Averaged cytosolic concentrations" on domains 1-3
    data = dset4
    table = tbl2
    expr = {uEr/(L*pi*he^2+4/3*pi*he^3), uEl/(L*pi*he^2+4/3*pi*he^3)}
    method = integration
    intorder = 1
    intvolume = on
  int2: IntLine "Averaged membrane densities" on boundaries 6-8
    data = dset4
    table = tbl1
    expr = ude/(L*pi*he^2+4/3*pi*he^3)
    method = integration
    intorder = 1
    intsurface = on

Tables
  tbl1: Table
    // Line Integration 2
    rhoE | Time | ude/(L*pi*he^2+4/3*pi*he^3)
    251.189 | 2000 | 231.37
    251.189 | 2002 | 231.37
    251.189 | 2004 | 231.37
    251.189 | 2006 | 231.37
    251.189 | 2008 | 231.37
    251.189 | 2010 | 231.37
    251.189 | 2012 | 231.37
    251.189 | 2014 | 231.37
    251.189 | 2016 | 231.37
    251.189 | 2018 | 231.37
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  tbl2: Table
    // Surface Integration 1
    rhoE | Time | uEr/(L*pi*he^2+4/3*pi*he^3) | uEl/(L*pi*he^2+4/3*pi*he^3)
    251.189 | 2000 | 0.0534585 | 19.7436
    251.189 | 2002 | 0.0534585 | 19.7436
    251.189 | 2004 | 0.0534585 | 19.7436
    251.189 | 2006 | 0.0534585 | 19.7436
    251.189 | 2008 | 0.0534585 | 19.7436
    251.189 | 2010 | 0.0534585 | 19.7436
    251.189 | 2012 | 0.0534585 | 19.7436
    251.189 | 2014 | 0.0534585 | 19.7436
    251.189 | 2016 | 0.0534585 | 19.7436
    251.189 | 2018 | 0.0534585 | 19.7436
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
Plots
  pg4: PlotGroup1D "MinD membrane density" | data = edg1
    lngr1: LineGraph | expr = ud+ude
  pg5: PlotGroup2D "Cytosolic density" | data = dset4
    surf1: Surface | expr = uDD
  pg6: PlotGroup2D "Kymograph" | data = par1
    surf1: Surface | expr = uDD

Exports
  data1: Data
    data = edg1
    expr = {ud, ude}
    filename = E:\Henrik\Projects\20240812-inVivo\switchModel-spherocylinder2DRotSymm-kD-1-kdD-0_005-kdEl-times2-rhoD-3000-wavelengthPeriodSweep.txt
    location = regulargrid
    regulargridx1 = 250
  tbl1: Table
    table = tbl1
    filename = E:\Henrik\Projects\20240812-inVivo\switchModel-spherocylinder2DRotSymm-kD-1-kdD-0_005-kdEl-times2-rhoD-3000-rhoE-sweep-mdeAvg.txt
  tbl2: Table
    table = tbl2
    filename = E:\Henrik\Projects\20240812-inVivo\switchModel-spherocylinder2DRotSymm-kD-1-kdD-0_005-kdEl-times2-rhoD-3000-rhoE-sweep-cEr-cEl-Avg.txt