// COMSOL Multiphysics 6.1.0.282 model "switchModel-spherocylinder2DRotSymm-rhoD_1500-wavelengthPeriod.mph"
// Outline of the model tree
// Unit system: none

Parameters
  L = 50
  he = 0.5
  dL = 0.1
  rhoD = 1500
  rhoE = 13500
  DD = 16
  DE = 10
  Dd = 0.05
  Dde = 0.05
  De = 1
  kD = 0.3
  kdD = 0.0015
  kdEr = 1.5
  kdEl = 10^-5
  kde = 1
  lambda = 5
  mu = 20
  pert = 0.01
  pm = 0
  ke = 1/10
  ked = kdEr

Functions
  rn1: Random | nargs = 3; seed = 20221104

Variables
  var1 "Variables 1"

Geometry
  geom1 "Geometry 1" (2D axisymmetric, length unit cm)
    r1: Rectangle | size = {he, L}
    c1: Circle | rot = 270; r = he; angle = 90
    c2: Circle | pos = {0, L}; r = he; angle = 90
    fin: Finalize "Form Union"

Physics
  g: GeneralFormPDE on all domains
    dependent variable u = {uDD, uDT, uEr, uEl}
    ShapeProperty.order = 1
    EquationForm.form = Automatic
    gfeq1: GeneralFormPDE (default)
      f = {-lambda*uDD+DD*uDDr/r, lambda*uDD+DD*uDTr/r, -mu*uEr+DE*uErr/r, mu*uEr+DE*uElr/r}
      Ga = {{-DD*uDDr, -DD*uDDz}, {-DD*uDTr, -DD*uDTz}, {-DE*uErr, -DE*uErz}, {-DE*uElr, -DE*uElz}}
      da = {1, 0, 0, 0, 0, 1, 0, 0, 0, 0, 1, 0, 0, 0, 0, 1}
    zflx1: ZeroFluxBoundary "Zero Flux 1" (default)
    init1: init "Initial Values 1" (default) | uDT = rhoD*(1+pert*rn1(r,z,1)); uEl = rhoE*(1+pert*rn1(r,z,2))
    flux1: FluxBoundary "Flux/Source 1" on boundaries 6-8
      g = {kde*ude, -(kD+kdD*ud)*uDT, -kdEr*ud*uEr+(1-pm)*kde*ude+ke*ue, -kdEl*ud*uEl}
  gb: GeneralFormBoundaryPDE on boundaries 6-8
    dependent variable u2 = {ud, ude, ue}
    ShapeProperty.order = 2
    EquationForm.form = Automatic
    gfeq1: GeneralFormPDE (default)
      f = {(kD+kdD*ud)*uDT-(kdEr*uEr+kdEl*uEl+ked*ue)*ud+Dd*udTr/r, (kdEr*uEr+kdEl*uEl+ked*ue)*ud-kde*ude+Dde*udeTr/r, pm*kde*ude-ked*ud*ue-ke*ue+De*ueTr/r}
      Ga = {{-udTr*Dd, -udTz*Dd}, {-udeTr*Dde, -udeTz*Dde}, {-ueTr*De, -ueTz*De}}
      da = 1
    init1: init "Initial Values 1" (default)

Mesh
  mesh1 "Mesh 1"
    size: MeshSizeDefault | hmin = dL; custom = on; hmax = 1
    ftri1: FreeTri "Free Triangular 1" on remaining entities | method = del
      size1: Size on boundaries 6-8 | hmax = dL; hmin = dL; custom = on

Studies
  std1 "Study 1"
    batsw: BatchSweep
      sweeptype = filled
      pname = rhoE
      plistarr = 10^range(2,0.2,4.4),13500
      batchfile = switchModelRotSim.mph
      clustersettings = on
      batchdir = D:\Henrik\Projects\2021-Min-in-vivo\switchPMBModel-spherocylinder\LeschiSim-derivedParams\comsolData
      maxallow = 2
    time: Transient "Time Dependent" | tlist = range(0,2,3000); usertol = on; rtol = 10^-5

Solver configurations
  sol1 "Solution 1" (study std1)
    v1: Variables "Dependent Variables 1"
    t1: Time "Time-Dependent Solver 1"
      tlist = range(0,2,3000)
      atolglobalvaluemethod = manual
      atolglobal = 10^-5
      initialstepbdf = 10^-7
      bwinitstepfrac = 1e-4
      dDef: Direct | linsolver = pardiso
      fc1: FullyCoupled | linsolver = dDef
  sol4 "Parametric Solutions 2" (study std1)

Datasets
  dset1: Solution | solution = sol1
  dset3: Solution | solution = sol4
  rev2: Revolve2D "Revolution 2D 2" | data = dset3; startangle = -90; revangle = 225
  edg1: Edge2D on boundaries 6 | data = dset3
  par1: Parametric1D "Parametric Extrusion 1D 1" | data = edg1

Plots
  pg5: PlotGroup2D "General Form PDE 2" | data = dset3
    surf1: Surface | expr = uDD
  pg6: PlotGroup3D "General Form PDE 3" | data = rev2
    surf1: Surface | expr = uDD
  pg7: PlotGroup2D "General Form Boundary PDE 1" | data = dset3
    line1: Line | expr = ud
  pg8: PlotGroup2D "2D Plot Group 8" | data = par1
    surf1: Surface | expr = ud+ude

Exports
  data1: Data | data = edg1; expr = {ud, ude}; location = regulargrid; regulargridx1 = 250